### Bin Flow Simulation
###This simulation involves inserting a set of particles into a cylindrical hopper,
###allowing them to settle under gravity, and then suddenly opening a stopper at the
###bottom of the hopper and allowing the particles to pour out. We track the
###flowrate of material from the hopper by tracking how many particles remain in the
###system as a function of time.
### Initialization
# Preliminaries
units	si
atom_style	sphere
atom_modify	map array
boundary	f f f
newton	off
communicate	single vel yes
#processors	* * *

read_restart    ../DEM/liggghts.restart

# Declare domain
#region	domain block -0.05 0.05 -0.05 0.05 -0.25 0.25 units box
#create_box	2 domain

# Neighbor listing
neighbor	0.0015 bin
neigh_modify every 1 check no

### Setup
# Material and interaction properties required
fix	m1 all property/global youngsModulus 		peratomtype 	1.0e7	1.0e7
fix	m2 all property/global poissonsRatio 		peratomtype 	0.2 	0.2
fix	m3 all property/global coefficientRestitution 	peratomtypepair 2 0.9 	0.9 	0.9 	0.9
fix	m4 all property/global coefficientFriction 	peratomtypepair 2 0.13 	0.13 	0.13 	0.13


# Import mesh from cad:
fix	cad1 all mesh/surface file ../DEM/hopper.stl type 2 scale 0.1

# Use the imported mesh as granular wall
#fix	geometry all wall/gran/hertz/history mesh n_meshes 1 meshes cad1
fix	geometry all wall/gran model hertz tangential history mesh n_meshes 1 meshes cad1

# Create stopper for funnel
#fix	stopper all wall/gran/hertz/history primitive type 2 zplane 0.0
fix	stopper all wall/gran model hertz tangential history primitive type 2 zplane 0.0
fix	rod all wall/gran model hertz tangential history primitive type 2 zcylinder 0.001 0.0 0.0
#fix	bwall1 all wall/gran model hertz tangential history primitive type 2 zplane -0.25
fix	bwall2 all wall/gran model hertz tangential history primitive type 2 zplane 0.25
fix	bwall3 all wall/gran model hertz tangential history primitive type 2 xplane -0.05
fix	bwall4 all wall/gran model hertz tangential history primitive type 2 xplane 0.05
fix	bwall5 all wall/gran model hertz tangential history primitive type 2 yplane -0.05
fix	bwall6 all wall/gran model hertz tangential history primitive type 2 yplane 0.05

# Define the physics
#pair_style	gran/hertz/history
pair_style	gran model hertz tangential history
pair_coeff	* *

# cfd coupling
fix         cfd all couple/cfd couple_every 100 mpi
fix         cfd2 all couple/cfd/force/implicit

### Detailed settings
# Integrator
fix	integrate all nve/sphere

# Gravity
fix	grav 	all gravity 	9.81 vector 0.0 0.0 -1.0
fix 	bu 	all buoyancy 	level 0.25 dim z density 1000

# Time step
timestep 0.000004

# Thermodynamic output settings
thermo_style	custom step atoms ke cpu
thermo	10000
thermo_modify	norm no lost ignore

# Check time step and initialize dump file
fix	ctg all check/timestep/gran 1 0.01 0.01
run	1
unfix	ctg

################################################################
# count particles above z = 0
# ##############################################################
# region id=topregion is the z > 0
region topregion block -0.05 0.05 -0.05 0.05 0.0 0.25

# count particles in region id = topregion
# set nh to particle count
# set nhtime to evaluation time
variable nh equal "count(all,topregion)"
variable nhtime equal time

# append the above variables into file
fix dhprint all print 100 "${nhtime} ${nh}" append time_vs_N.txt

#################################################################

# Create imaging information
dump	dumpstl all stl 1000000 dump*.stl
dump	dmp all custom 1000000 dump*.hopper id x y z vx vy vz radius

### Execution and further settings
# Fill the hopper
#run	150000 upto

# Pull the stopper
unfix	stopper
unfix	rod
run	1
